<?xml version="1.0"?>
<?xml-stylesheet type="text/xsl" href="http://jsbsim.sourceforge.net/JSBSim.xsl"?>
<fdm_config name="MIRA" version="2.0" release="ALPHA"
   xmlns:xsi="http://www.w3.org/2001/XMLSchema-instance"
   xsi:noNamespaceSchemaLocation="http://jsbsim.sourceforge.net/JSBSim.xsd">

 <fileheader>
	<author> Aeromatic v 0.96 </author>
	<filecreationdate>2024-05-17</filecreationdate>
	<version>$Revision: 1.20 $</version>
	<description> Models ALEDA. </description>

	<author>Richard Harrison</author>
	<filecreationdate>2015-08-29</filecreationdate>
	<version>1.0</version>
	<description>F-15 - basic aerodynamics are the same, except for the two place canopy which is accounted for</description>
	<note>Aircraft origin for measurements is the nose</note>
 </fileheader>

	<!--
	  File:     ALEDA.xml
	  Inputs:
		name:          ALEDA
		type:          four-engine transonic transport
		max weight:    26 kg
		wing span:     1.3 mach
		length:        2.6 m (@ chord)
		wing area:     2.3 m²
		gear type:     tricycle
		castering:
		retractable?:  yes
		# engines:     4
		engine type:   impeller
		engine layout: middle fuselage
		yaw damper?    no


	-->

	 <metrics>
	   <wingarea  unit="M2">    3.634  </wingarea>
	   <wingspan  unit="M" >    1.764 </wingspan>
	   <wing_incidence>        -5.00 </wing_incidence>
	   <chord     unit="M" >    2.18   </chord>
	   <location name="AERORP" unit="M">
		 <x>   1.75 </x>
		 <y>   0.00 </y>
		 <z>   0.00 </z>
	   </location>
	   <location name="EYEPOINT" unit="M">
		 <x>  1.75 </x>
		 <y>  0.00 </y>
		 <z>  0.0 </z>
	   </location>
	   <location name="VRP" unit="M">
		 <x>0</x>
		 <y>0</y>
		 <z>0</z>
	   </location>
	 </metrics>

      <mass_balance>
	   <ixx unit="KG*M2">        1.115 </ixx>
	   <iyy unit="KG*M2">        6.819 </iyy>
	   <izz unit="KG*M2">        7.559 </izz>
	   <emptywt unit="KG" >      28.719 </emptywt>
	   <location name="CG" unit="M">
		 <x>  1.750 </x>
		 <y>   0.00 </y>
		 <z>   0.00 </z>
	   </location>

	   <pointmass name="Payload">
		<description> -58 KG + full (212 KG) fuel should bring model up to entered max weight</description>
		<weight unit="KG">    0.001 </weight>
		<location name="POINTMASS" unit="M">
		  <x>  0 </x>
		  <y>   0.00 </y>
		  <z>  -0 </z>
		</location>
	  </pointmass>
	 </mass_balance>

	 <ground_reactions>

	  	<contact type="BOGEY" name="NOSE">
			<location unit="M">
				<x> 0.7 </x>
				<y> 0.00 </y>
				<z> -0.38 </z>
			</location>
			<static_friction> 0.50 </static_friction>
			<dynamic_friction> 0.40 </dynamic_friction>
			<rolling_friction> 0.03 </rolling_friction>
			<spring_coeff unit="N/M"> 4500.15 </spring_coeff>
			<damping_coeff unit="N/M/SEC"> 56.07 </damping_coeff>
			<max_steer unit="DEG"> 10.00 </max_steer>
			<brake_group>NONE</brake_group>
			<retractable>1</retractable>
		</contact>

		<contact type="BOGEY" name="LEFT_MAIN">
			<location unit="M">
				<x> 2.31 </x>
				<y> -0.5 </y>
				<z> -0.35 </z>
			</location>
			<static_friction> 0.50 </static_friction>
			<dynamic_friction> 0.40 </dynamic_friction>
			<rolling_friction> 0.03 </rolling_friction>
			<spring_coeff unit="N/M"> 4500.15 </spring_coeff>
			<damping_coeff unit="N/M/SEC"> 253.58 </damping_coeff>
			<max_steer unit="DEG">0</max_steer>
			<brake_group>LEFT</brake_group>
			<retractable>1</retractable>
		</contact>

		<contact type="BOGEY" name="RIGHT_MAIN">
			<location unit="M">
				<x> 2.31 </x>
				<y> 0.5 </y>
				<z> -0.35 </z>
			</location>
			<static_friction> 0.50 </static_friction>
			<dynamic_friction> 0.40 </dynamic_friction>
			<rolling_friction> 0.03 </rolling_friction>
			<spring_coeff unit="N/M"> 4500.15 </spring_coeff>
			<damping_coeff unit="N/M/SEC"> 253.58 </damping_coeff>
			<max_steer unit="DEG">0</max_steer>
			<brake_group>RIGHT</brake_group>
			<retractable>1</retractable>
		</contact>


	  <contact type="STRUCTURE" name="LEFT_WING">
		<location unit="M">
		 <x>  3.57 </x>
		 <y>  -0.74 </y>
		 <z>  -0.075 </z>
		</location>
		<static_friction>  1.00 </static_friction>
		<dynamic_friction> 1.00 </dynamic_friction>
		<spring_coeff unit="N/M">        507.15 </spring_coeff>
		<damping_coeff unit="N/M/SEC">   507.15 </damping_coeff>
	  </contact>

	  <contact type="STRUCTURE" name="RIGHT_WING">
		<location unit="M">
		 <x>  3.57 </x>
		 <y>   0.74 </y>
		 <z>  -0.075 </z>
		</location>
		<static_friction>  1.00 </static_friction>
		<dynamic_friction> 1.00 </dynamic_friction>
		<spring_coeff unit="N/M">        507.15 </spring_coeff>
		<damping_coeff unit="N/M/SEC">   507.15 </damping_coeff>
	  </contact>

	  <contact type="STRUCTURE" name="NOSE">
		<location unit="M">
		 <x>  0.000 </x>
		 <y>   0.00 </y>
		 <z>  0.0 </z>
		</location>
		<static_friction>  1.00 </static_friction>
		<dynamic_friction> 1.00 </dynamic_friction>
		<spring_coeff unit="N/M">        507.15 </spring_coeff>
		<damping_coeff unit="N/M/SEC">   507.15 </damping_coeff>
	  </contact>

	 </ground_reactions>

	 <propulsion>

	   <engine file="ALEDA_engine">
	   	<location unit="M">
		   <x>  0.974 </x>
		   <y>  0.283 </y>
		   <z>  0.004 </z>
		 </location>
		 <orient unit="DEG">
		   <pitch> 0.00 </pitch>
		   <roll>  0.00 </roll>
		   <yaw>   0.00 </yaw>
		 </orient>
		<feed>0</feed>
		<thruster file="direct">
		 <location unit="M">
		   <x>  0.0 </x>
		   <y>  0.00 </y>
		   <z>  0.00 </z>
		 </location>
		 <orient unit="DEG">
		   <pitch> 0.00 </pitch>
		   <roll>  0.00 </roll>
		   <yaw>   0.00 </yaw>
		 </orient>
		</thruster>
	  </engine>

	   <engine file="ALEDA_engine">
	   	<location unit="M">
		   <x>  0.974 </x>
		   <y>  -0.283 </y>
		   <z>  0.004 </z>
		 </location>
		 <orient unit="DEG">
		   <pitch> 0.00 </pitch>
		   <roll>  0.00 </roll>
		   <yaw>   0.00 </yaw>
		 </orient>
		<feed>1</feed>
		<thruster file="direct">
		 <location unit="M">
		   <x>  0.0 </x>
		   <y>  0.00 </y>
		   <z>  0.00 </z>
		 </location>
		 <orient unit="DEG">
		   <pitch> 0.00 </pitch>
		   <roll>  0.00 </roll>
		   <yaw>   0.00 </yaw>
		 </orient>
		</thruster>
	  </engine>

	   <engine file="ALEDA_engine">
	   	<location unit="M">
		   <x> 0.780 </x>
		   <y> 0.184 </y>
		   <z> 0.053 </z>
		 </location>
		 <orient unit="DEG">
		   <pitch> 0.00 </pitch>
		   <roll>  0.00 </roll>
		   <yaw>   0.00 </yaw>
		 </orient>
		<feed>2</feed>
		<thruster file="direct">
		 <location unit="M">
		   <x> 0.0 </x>
		   <y> 0.0 </y>
		   <z> 0.0 </z>
		 </location>
		 <orient unit="DEG">
		   <pitch> 0.00 </pitch>
		   <roll>  0.00 </roll>
		   <yaw>   0.00 </yaw>
		 </orient>
		</thruster>
	  </engine>

	   <engine file="ALEDA_engine">
	   	<location unit="M">
		   <x> 0.780 </x>
		   <y> -0.184 </y>
		   <z> 0.053 </z>
		 </location>
		 <orient unit="DEG">
		   <pitch> 0.00 </pitch>
		   <roll>  0.00 </roll>
		   <yaw>   0.00 </yaw>
		 </orient>
		<feed>3</feed>
		<thruster file="direct">
		 <location unit="M">
		   <x>  0.0 </x>
		   <y>  0.0 </y>
		   <z>  0.0 </z>
		 </location>
		 <orient unit="DEG">
		   <pitch> 0.00 </pitch>
		   <roll>  0.00 </roll>
		   <yaw>   0.00 </yaw>
		 </orient>
		</thruster>
	  </engine>

	  <tank type="FUEL" number="0">
		 <location unit="M">
		   <x>  1.4 </x>
		   <y>   0.00 </y>
		   <z>  0.0 </z>
		 </location>
		 <capacity unit="KG">  0.01 </capacity>
		 <contents unit="KG">  0.01 </contents>
	  </tank>

	  <tank type="FUEL" number="1">
		 <location unit="M">
		   <x>  1.62 </x>
		   <y>   0.00 </y>
		   <z>  0.0 </z>
		 </location>
		 <capacity unit="KG">  0.01 </capacity>
		 <contents unit="KG">  0.01 </contents>
	  </tank>

	  <tank type="FUEL" number ="2">
		 <location unit="M">
		   <x>  1.8 </x>
		   <y>   0.00 </y>
		   <z>  0.0 </z>
		 </location>
		 <capacity unit="KG">  0.01 </capacity>
		 <contents unit="KG">  0.01 </contents>
	  </tank>

	  <tank type="FUEL" number ="3">
		 <location unit="M">
		   <x>  2.2 </x>
		   <y>   0.00 </y>
		   <z>  0.0 </z>
		 </location>
		 <capacity unit="KG">  0.01 </capacity>
		 <contents unit="KG">  0.01 </contents>
	  </tank>


	 </propulsion>


	 <flight_control name="FCS: MIRA">


	  <channel name="Pitch">

	   <summer name="Pitch Trim Sum">
		  <input>fcs/elevator-cmd-norm</input>
		  <input>fcs/pitch-trim-cmd-norm</input>
		  <clipto>
			<min> -1 </min>
			<max>  1 </max>
		  </clipto>
	   </summer>

	   <aerosurface_scale name="Elevator Control">
		  <input>fcs/pitch-trim-sum</input>
		  <range>
			<min> -0.436 </min>
			<max>  0.436 </max>
		  </range>
		  <output>fcs/elevator-pos-rad</output>
	   </aerosurface_scale>

	   <aerosurface_scale name="elevator normalization">
		  <input>fcs/elevator-pos-rad</input>
		  <domain>
			<min> -0.436 </min>
			<max>  0.436 </max>
		  </domain>
		  <range>
			<min> -1 </min>
			<max>  1 </max>
		  </range>
		  <output>fcs/elevator-pos-norm</output>
	   </aerosurface_scale>

	  </channel>

	  <channel name="Roll">

	   <summer name="Roll Trim Sum">
		  <input>fcs/aileron-cmd-norm</input>
		  <input>fcs/roll-trim-cmd-norm</input>
		  <clipto>
			<min> -1 </min>
			<max>  1 </max>
		  </clipto>
	   </summer>

	   <aerosurface_scale name="Left Aileron Control">
		  <input>fcs/roll-trim-sum</input>
		  <range>
			<min> -0.3 </min>
			<max>  0.3 </max>
		  </range>
		  <output>fcs/left-aileron-pos-rad</output>
	   </aerosurface_scale>

	   <aerosurface_scale name="Right Aileron Control">
		  <input>fcs/roll-trim-sum</input>
		  <range>
			<min> -0.3 </min>
			<max>  0.3 </max>
		  </range>
		  <output>fcs/right-aileron-pos-rad</output>
	   </aerosurface_scale>

	   <aerosurface_scale name="left aileron normalization">
		  <input>fcs/left-aileron-pos-rad</input>
		  <domain>
			<min> -0.3 </min>
			<max>  0.3 </max>
		  </domain>
		  <range>
			<min> -1 </min>
			<max>  1 </max>
		  </range>
		  <output>fcs/left-aileron-pos-norm</output>
	   </aerosurface_scale>

	   <aerosurface_scale name="right aileron normalization">
		  <input>fcs/right-aileron-pos-rad</input>
		  <domain>
			<min> -0.3 </min>
			<max>  0.3 </max>
		  </domain>
		  <range>
			<min> -1 </min>
			<max>  1 </max>
		  </range>
		  <output>fcs/right-aileron-pos-norm</output>
	   </aerosurface_scale>

	  </channel>

	  <channel name="Yaw">

	   <summer name="Rudder Command Sum">
		  <input>fcs/rudder-cmd-norm</input>
		  <input>fcs/yaw-trim-cmd-norm</input>
		  <clipto>
			<min> -1 </min>
			<max>  1 </max>
		  </clipto>
	   </summer>

	   <aerosurface_scale name="Rudder Control">
		  <input>fcs/rudder-command-sum</input>
		  <range>
			<min> -0.1745 </min>
			<max>  0.1745 </max>
		  </range>
		  <output>fcs/rudder-pos-rad</output>
	   </aerosurface_scale>

	   <aerosurface_scale name="rudder normalization">
		  <input>fcs/rudder-pos-rad</input>
		  <domain>
			<min> -0.1745 </min>
			<max>  0.1745 </max>
		  </domain>
		  <range>
			<min> -1 </min>
			<max>  1 </max>
		  </range>
		  <output>fcs/rudder-pos-norm</output>
	   </aerosurface_scale>

	  </channel>


	  <channel name="Landing Gear">
	   <kinematic name="Gear Control">
		 <input>gear/gear-cmd-norm</input>
		 <traverse>
		   <setting>
			  <position> 0 </position>
			  <time>     0 </time>
		   </setting>
		   <setting>
			  <position> 1 </position>
			  <time>     5 </time>
		   </setting>
		 </traverse>
		 <output>gear/gear-pos-norm</output>
	   </kinematic>
      </channel>


	 </flight_control>

	 <aerodynamics>

	  <alphalimits unit="DEG">
	  <min> 0 </min>
	  <max> 20 </max>
	  </alphalimits>

	  <axis name="LIFT">

		<!-- from Excel Table "P:\03 Projekte\01 RDRS\03 ALEDA\Technical Data\01_ALEDA_VSP_Vergleich.xlsx" Sheet CFD Zusammenfassung -->
		<function name="aero/force/CLalpha">
		  <description>Lift due to alpha</description>
		  <product>
			  <property>aero/qbar-psf</property>
			  <property>metrics/Sw-sqft</property>
			  <table>
				<independentVar lookup="row">aero/alpha-rad</independentVar>
				<tableData>
				   -0.261799   -0.31632
					0.000000	0.002269711
					0.069813	0.11749001
					0.139626	0.2362156
					0.209440	0.36672587
					0.279253	0.50875796
					0.349066	0.63929132
				    0.523599    1.0529669
				    0.69813		1.2642086
				</tableData>
			  </table>
		  </product>
		</function>

		<!-- from Excel Table "P:\03 Projekte\01 RDRS\03 ALEDA\Technical Data\01_ALEDA_VSP_Vergleich.xlsx" Sheet CFD Zusammenfassung -->
		<function name="aero/force/CLde">
		   <description>Lift due to Elevator Deflection</description>
		   <product>
			   <property>aero/qbar-psf</property>
			   <property>metrics/Sw-sqft</property>
			   <property>fcs/elevator-pos-rad</property>
			   <table>
				<independentVar lookup="row">aero/alpha-rad</independentVar>
				<tableData>
					-0.2    	 0.41055
					0.0349066	 0.41055
					0.0785398	0.43684
					0.2094395	0.51387
				</tableData>
			  </table>
		   </product>
		</function>

	  </axis>

	  <axis name="DRAG">

		<!-- from Excel Table "P:\03 Projekte\01 RDRS\03 ALEDA\Technical Data\01_ALEDA_VSP_Vergleich.xlsx" Sheet CFD Zusammenfassung -->
		<function name="aero/force/CD0">
		   <description>Drag at zero lift</description>
		   <product>
			  <property>aero/qbar-psf</property>
			  <property>metrics/Sw-sqft</property>
			  <table>
				<independentVar lookup="row">aero/alpha-rad</independentVar>
				<tableData>
				   -0.261799    0.0093225
					0.000000	0.0093225
					0.069813	0.013842222
					0.139626	0.029745038
					0.209440	0.061915016
					0.279253	0.11663518
					0.349066	0.2005384
					0.523599    0.5369567
				    0.69813		0.9439206
				</tableData>
			  </table>
		   </product>
		</function>


		<function name="aero/force/CDi">
		   <description>Induced drag</description>
			 <product>
			   <property>aero/qbar-psf</property>
			   <property>metrics/Sw-sqft</property>
			   <property>aero/cl-squared</property>
			   <value>0.00</value>
			 </product>
		</function>

		<!-- Rough Estimation from Raymer -->
		<function name="aero/force/CDgear">
		   <description>Drag due to gear</description>
			 <product>
			   <property>aero/qbar-psf</property>
			   <property>metrics/Sw-sqft</property>
			   <property>gear/gear-pos-norm</property>
			   <value>0.012</value>
			 </product>
		</function>

		<!-- From VSP Stability analysis, needs to be reworked as value probably is too low -->
		<function name="aero/force/CDbeta">
		   <description>Drag due to sideslip</description>
		   <product>
			  <property>aero/qbar-psf</property>
			  <property>metrics/Sw-sqft</property>
			  <table>
				<independentVar lookup="row">aero/beta-rad</independentVar>
				<tableData>
				  -1.0     0.013
				   0.00    0.000
					1.0    0.013
				</tableData>
			  </table>
		   </product>
		</function>

		<!-- From CFD ALEDA Table: "P:\03 Projekte\01 RDRS\03 ALEDA\Technical Data\01_ALEDA_VSP_Vergleich.xlsx"  -->
		<function name="aero/force/CDde">
		   <description>Drag due to Elevator Deflection</description>
		   <product>
			   <property>aero/qbar-psf</property>
			   <property>metrics/Sw-sqft</property>
			   <property>fcs/elevator-pos-rad</property>
			   <table>
				<independentVar lookup="row">aero/alpha-rad</independentVar>
				<tableData>
					-0.2    	 -0.0140205
					0.0349066	 -0.0140205
					0.0785398	0.0179083
					0.2094395	0.0892892
				</tableData>
			  </table>
		   </product>
		</function>

	  </axis>

	  <axis name="SIDE">

		<!-- From VSP Stability analysis  P:\03 Projekte\11_RDRS-OP3\02_TechnicalData\02_System_Aerodynamics\ALEDA_Stability -->
		<function name="aero/force/CYb">
		   <description>Side force due to beta</description>
		   <product>
			   <property>aero/qbar-psf</property>
			   <property>metrics/Sw-sqft</property>
			   <property>aero/beta-rad</property>
			   <table>
				<independentVar lookup="row">aero/alpha-rad</independentVar>
				<tableData>
					0.0     	-0.13303
					0.174533	-0.076574
					0.349066  	-0.169105
				</tableData>
			  </table>
		   </product>
		</function>


		<!-- From VSP Stability analysis  P:\03 Projekte\11_RDRS-OP3\02_TechnicalData\02_System_Aerodynamics\ALEDA_Stability -->
		<function name="aero/force/CYp">
		   <description>Side force due to roll</description>
		   <product>
			   <property>aero/qbar-psf</property>
			   <property>metrics/Sw-sqft</property>
			   <property>metrics/bw-ft</property>
			   <property>aero/bi2vel</property>
			   <property>velocities/p-aero-rad_sec</property>
			   <table>
				<independentVar lookup="row">aero/alpha-rad</independentVar>
				<tableData>
					0.0     	-0.0538747
					0.174533	 0.3284812
					0.349066  	 0.8864294
				</tableData>
			   </table>
		   </product>
		</function>

		<!-- From VSP Stability analysis  P:\03 Projekte\11_RDRS-OP3\02_TechnicalData\02_System_Aerodynamics\ALEDA_Stability -->
		<function name="aero/force/CYr">
		   <description>Side force due to yaw</description>
		   <product>
			   <property>aero/qbar-psf</property>
			   <property>metrics/Sw-sqft</property>
			   <property>metrics/bw-ft</property>
			   <property>aero/bi2vel</property>
			   <property>velocities/r-aero-rad_sec</property>
			   <table>
				<independentVar lookup="row">aero/alpha-rad</independentVar>
				<tableData>
					0.0     	 0.2570279
					0.174533	 0.4095311
					0.349066  	 0.7670086
				</tableData>
			   </table>
		   </product>
		</function>

	  </axis>

	  <axis name="ROLL">

		<!-- From VSP Stability analysis  P:\03 Projekte\11_RDRS-OP3\02_TechnicalData\02_System_Aerodynamics\ALEDA_Stability -->
		<function name="aero/force/Clb">
		   <description>Roll moment due to beta</description>
		   <product>
			   <property>aero/qbar-psf</property>
			   <property>metrics/Sw-sqft</property>
			   <property>metrics/bw-ft</property>
			   <property>aero/beta-rad</property>
			   <table>
				<independentVar lookup="row">aero/alpha-rad</independentVar>
				<tableData>
				  0.0      -0.0057570
				  0.174533 -0.209241
				  0.34907  -0.360266
				</tableData>
			   </table>
		   </product>
		</function>

		<!-- From VSP Stability analysis  P:\03 Projekte\11_RDRS-OP3\02_TechnicalData\02_System_Aerodynamics\ALEDA_Stability -->
		<function name="aero/force/Clp">
		   <description>Roll moment due to roll rate</description>
		   <product>
			   <property>aero/qbar-psf</property>
			   <property>metrics/Sw-sqft</property>
			   <property>metrics/bw-ft</property>
			   <property>aero/bi2vel</property>
			   <property>velocities/p-aero-rad_sec</property>
			   <table>
				<independentVar lookup="row">aero/alpha-rad</independentVar>
				<tableData>
				  0.0      -0.1368990
				  0.174533 -0.1875418
				  0.34907  -0.3546768
				</tableData>
			   </table>
		   </product>
		</function>


		<!-- From VSP Stability analysis  P:\03 Projekte\11_RDRS-OP3\02_TechnicalData\02_System_Aerodynamics\ALEDA_Stability -->
		<function name="aero/force/Clr">
		   <description>Roll moment due to yaw rate</description>
		   <product>
			   <property>aero/qbar-psf</property>
			   <property>metrics/Sw-sqft</property>
			   <property>metrics/bw-ft</property>
			   <property>aero/bi2vel</property>
			   <property>velocities/r-aero-rad_sec</property>
			   <table>
				<independentVar lookup="row">aero/alpha-rad</independentVar>
				<tableData>
				  0.0      0.0123109
				  0.174533 0.0514912
				  0.34907  0.1673316
				</tableData>
			   </table>
		   </product>
		</function>

		<!-- From VSP Stability analysis  P:\03 Projekte\11_RDRS-OP3\02_TechnicalData\02_System_Aerodynamics\ALEDA_Stability -->
		<function name="aero/force/Clda">
		   <description>Roll moment due to aileron</description>
		   <product>
			  <property>aero/qbar-psf</property>
			  <property>metrics/Sw-sqft</property>
			  <property>metrics/bw-ft</property>
			  <property>fcs/left-aileron-pos-rad</property>
			   <table>
				<independentVar lookup="row">aero/alpha-rad</independentVar>
				<tableData>
				  0.0      0.0839012
				  0.174533 0.0986289
				  0.34907  0.0899045
				</tableData>
			   </table>
		   </product>
		</function>

		<!-- From VSP Stability analysis  P:\03 Projekte\11_RDRS-OP3\02_TechnicalData\02_System_Aerodynamics\ALEDA_Stability -->
		<function name="aero/force/Cldr">
		   <description>Roll moment due to rudder</description>
		   <product>
			   <property>aero/qbar-psf</property>
			   <property>metrics/Sw-sqft</property>
			   <property>metrics/bw-ft</property>
			   <property>fcs/rudder-pos-rad</property>
			   <table>
				<independentVar lookup="row">aero/alpha-rad</independentVar>
				<tableData>
				  0.0     -0.0027314
				  0.174533 0.0136213
				  0.34907  0.0119970
				</tableData>
			   </table>
		   </product>
		</function>

	  </axis>

	  <axis name="PITCH">


		<!-- From Clean VSP Aerodynamics (no elevon deflection) -->
		<function name="aero/force/Cmalpha">
		   <description>Pitch moment due to alpha</description>
		   <product>
			   <property>aero/qbar-psf</property>
			   <property>metrics/Sw-sqft</property>
			   <property>metrics/cbarw-ft</property>
			   <!-- <property>aero/alpha-rad</property> -->
			   <table>
				<independentVar lookup="row">aero/alpha-rad</independentVar>
				<tableData>
					-0.261799   -0.001248451
					0.000000	-0.001248451
					0.069813	-0.011911927
					0.139626	-0.022700071
					0.209440	-0.034985032
					0.279253	-0.04537138
					0.349066	-0.056833415
					0.523599    -0.094008846
				    0.69813		-0.12419171
				</tableData>
			   </table>
		   </product>
		</function>


		<!-- From  VSP Aerodynamics elevons deflected minus clean aerodynamics  -->
		<function name="aero/force/Cmde">
		   <description>Pitch moment due to elevator</description>
		   <product>
			  <property>aero/qbar-psf</property>
			  <property>metrics/Sw-sqft</property>
			  <property>metrics/cbarw-ft</property>
			  <property>fcs/elevator-pos-rad</property>
			   <table>
				<independentVar lookup="row">aero/alpha-rad</independentVar>
				<tableData>
					-0.2    	 -0.18846
					0.0349066	 -0.18846
					0.0785398	-0.19988
					0.2094395	-0.22810
				</tableData>
			  </table>
		   </product>
		</function>

		<!-- From VSP Stability Analysis -->
		<function name="aero/force/Cmq">
		   <description>Pitch moment due to pitch rate</description>
		   <product>
			   <property>aero/qbar-psf</property>
			   <property>metrics/Sw-sqft</property>
			   <property>metrics/cbarw-ft</property>
			   <property>aero/ci2vel</property>
			   <property>velocities/q-aero-rad_sec</property>
			   <table>
				<independentVar lookup="row">aero/alpha-rad</independentVar>
				<tableData>
				 0.0      -0.6632811
				 0.174533  -0.8370333
				 0.34907   -1.9333982
				</tableData>
			   </table>
		   </product>
		</function>

		<!-- Left at default value, needs to be recalculated -->
		<function name="aero/force/Cmadot">
		   <description>Pitch moment due to alpha rate</description>
		   <product>
			   <property>aero/qbar-psf</property>
			   <property>metrics/Sw-sqft</property>
			   <property>metrics/cbarw-ft</property>
			   <property>aero/ci2vel</property>
			   <property>aero/alphadot-rad_sec</property>
			   <value>-2</value>
		   </product>
		</function>

	  </axis>

	  <axis name="YAW">

		<!-- From VSP Stability Analysis -->
		<function name="aero/force/Cnb">
		   <description>Yaw moment due to beta</description>
		   <product>
			   <property>aero/qbar-psf</property>
			   <property>metrics/Sw-sqft</property>
			   <property>metrics/bw-ft</property>
			   <property>aero/beta-rad</property>
			   <table>
				<independentVar lookup="row">aero/alpha-rad</independentVar>
				<tableData>
				 0.0        0.1015087
				 0.174533   0.0438522
				 0.34907    0.0728312
				</tableData>
			   </table>
		   </product>
		</function>

		<!-- From VSP Stability Analysis -->
		<function name="aero/force/Cnr">
		   <description>Yaw moment due to yaw rate</description>
		   <product>
			   <property>aero/qbar-psf</property>
			   <property>metrics/Sw-sqft</property>
			   <property>metrics/bw-ft</property>
			   <property>aero/bi2vel</property>
			   <property>velocities/r-aero-rad_sec</property>
			   <table>
				<independentVar lookup="row">aero/alpha-rad</independentVar>
				<tableData>
				 0.0        -0.2046218
				 0.174533   -0.3141279
				 0.34907    -0.4590499
				</tableData>
			   </table>
		   </product>
		</function>

		<!-- From VSP Stability Analysis -->
		<function name="aero/force/Cnp">
		   <description>Yaw moment due to roll rate</description>
		   <product>
			   <property>aero/qbar-psf</property>
			   <property>metrics/Sw-sqft</property>
			   <property>metrics/bw-ft</property>
			   <property>aero/bi2vel</property>
			   <property>velocities/p-aero-rad_sec</property>
			   <table>
				<independentVar lookup="row">aero/alpha-rad</independentVar>
				<tableData>
				  0.0      0.0625347
				  0.17453 -0.1192959
				  0.34907 -0.3644373
				</tableData>
			   </table>
		   </product>
		</function>


		<!-- From VSP Stability Analysis -->
		<function name="aero/force/Cndr">
		   <description>Yaw moment due to rudder</description>
		   <product>
			   <property>aero/qbar-psf</property>
			   <property>metrics/Sw-sqft</property>
			   <property>metrics/bw-ft</property>
			   <property>fcs/rudder-pos-rad</property>
			   <table>
				<independentVar lookup="row">aero/alpha-rad</independentVar>
				<tableData>
				  0.0     0.0897074
				  0.17453 0.1169512
				  0.34907 0.0625474
				</tableData>
			   </table>
		   </product>
		</function>

		<!-- From VSP Stability Analysis -->
		<function name="aero/force/Cnda">
		   <description>Adverse yaw</description>
		   <product>
			   <property>aero/qbar-psf</property>
			   <property>metrics/Sw-sqft</property>
			   <property>metrics/bw-ft</property>
			   <property>fcs/left-aileron-pos-rad</property>
			   <table>
				<independentVar lookup="row">aero/alpha-rad</independentVar>
				<tableData>
				  0.0    -0.0210201
				  0.17453 -0.0033346
				  0.34907 0.0300310
				</tableData>
			   </table>
		   </product>
		</function>

	  </axis>

	 </aerodynamics>

	 <external_reactions>
	 </external_reactions>


    <output name="172.16.10.37" type="FLIGHTGEAR" port="5515" protocol="udp" rate="120"/>

	<output name="MiniMIRA_ext_datalog.csv" type="CSV" rate="20">
		<property> velocities/vc-kts </property>
		<property> flight-path/gamma-rad </property>
   	 	<velocities> ON </velocities>
		<fcs> ON </fcs>
		<rates> ON </rates>
		<position> ON </position>
		<forces> ON </forces>
		<moments> ON </moments>
		<aerosurfaces> ON </aerosurfaces>
		<coefficients> ON </coefficients>
		<atmosphere> ON </atmosphere>
		<propulsion> ON </propulsion>
	</output>
    <input port="5505"/>


	</fdm_config>
