<?xml version="1.0"?>
<!--
  File:     MM2_engine.xml
  Author:   Aero-Matic v 0.83

  Inputs:
    name:           MM2_engine
    type:           electric
    power:          including losses by Schubrohre
    augmented?      no
    injected?       no
-->


<turbine_engine name="MM Engine">
  <milthrust>  9.04 </milthrust>
  <bypassratio>     0.0 </bypassratio>
  <tsfc>            0.0 </tsfc>
  <bleed>           0.0 </bleed>
  <idlen1>         0.0 </idlen1>
  <idlen2>         0.0 </idlen2>
  <maxn1>         100.0 </maxn1>
  <maxn2>         100.0 </maxn2>
  <augmented>         0 </augmented>
  <injected>          0 </injected>

  <function name="IdleThrust">
   <table>
    <independentVar lookup="row">velocities/mach</independentVar>
    <independentVar lookup="column">atmosphere/density-altitude</independentVar>
    <tableData>
         -10000     0     10000   20000   30000   40000   50000   60000
     0.0  0.0     0.0     0.0     0.0     0.0     0.0     0.0     0.0
     0.05 0.0     0.0     0.0     0.0     0.0     0.0     0.0     0.00
     0.1  0.0     0.0     0.0     0.0     0.0     0.0     0.0     0.0
     0.15 0.0     0.0     0.0     0.0     0.0     0.0     0.0     0.0
     0.2  0.0     0.0     0.0     0.0     0.0     0.0     0.0     0.0
     0.25 0.0     0.0     0.0     0.0     0.0     0.0     0.0     0.0
    </tableData>
   </table>
  </function>

  <function name="MilThrust">
   <table>
    <independentVar lookup="row">velocities/mach</independentVar>
    <independentVar lookup="column">atmosphere/density-altitude</independentVar>
    <tableData>
          -10000       0   10000   20000   30000   40000   50000   60000
     0.0   1.2600  0.886  0.886   0.886   0.886   0.886   0.886   0.886
     0.05  1.1710  0.6937 0.6937  0.6937  0.6937  0.6937  0.6937  0.6937
     0.1   1.1500  0.5014 0.5014  0.5014  0.5014  0.5014  0.5014  0.5014
     0.15  1.1810  0.3084 0.3084  0.3084  0.3084  0.3084  0.3084  0.3084
     0.2   1.2580  0.028  0.028   0.028   0.028   0.028   0.028   0.028
     0.25  1.3690  -0.057 -0.057  -0.057  -0.057  -0.057  -0.057  -0.057

    </tableData>
   </table>
  </function>

</turbine_engine>
