<?xml version="1.0"?>

<!-- Generated by Aero-Matic v 0.7

     Inputs:
       horsepower:   3.8
       pitch:        fixed
     Outputs:
       linear-blade-inches: 10.331602005498
-->

<propeller name="MM2 Impeller">

  <ixx unit="KG*M2"> 0.0005 </ixx>
  <diameter unit="M"> 0.09 </diameter>
  <gearratio>  0.7 </gearratio>
  <numblades> 12 </numblades>
  <minpitch> 25 </minpitch>
  <maxpitch> 25 </maxpitch>
  <maxrpm> 46350 </maxrpm>

  <table name="C_THRUST" type="internal">
     <tableData>
       0.0   0.4615
       0.1   0.4424
       0.2   0.4234
       0.3   0.3895
       0.4   0.3497
       0.5   0.3082
       0.6   0.2494
       0.7   0.1893
       0.8   0.1025
       1.0  -0.0347
       1.2  -0.1816
       1.4  -0.3268
     </tableData>
  </table>


  <table name="C_POWER" type="internal">
     <tableData>
       0.0   0.3100
       0.1   0.3100
       0.2   0.3024
       0.3   0.2952
       0.4   0.2782
       0.5   0.2549
       0.6   0.2341
       0.7   0.1966
       0.8   0.1606
       1.0   0.0575
       1.2  -0.0916
       1.4  -0.2758
       1.6  -0.4681
     </tableData>
  </table>

<!-- thrust effects of helical tip Mach -->
<table name="CT_MACH" type="internal">
  <tableData>
    0.85   1.0
    1.05   0.8
  </tableData>
</table>

<!-- power-required effects of helical tip Mach -->
<table name="CP_MACH" type="internal">
  <tableData>
    0.85   1.0
    1.05   1.8
    2.00   1.4
  </tableData>
</table>

</propeller>
